! *** *** Saurabh is AWESOME :D *** ***
! TCS AUTO
! *** *** Saurabh is AWESOME :D *** ***
TCS
! Mach
0.0
! Xsym	Ysym	Zsym
0 0 0
! Sref	Cref	Bref
  0.5   0.3   1.6
! Xref	Yref	Zref
  0.20   0.78   0.00
! CDp
0.025

! *** *** Saurabh is AWESOME :D *** ***
SURFACE
WING
! Nchordwise	Cspace	Nspanwise	Sspace
7 1.0

SECTION
! Xle	Yle	Zle	Chord	Ainc	Nspanwise	Sspace
 0.00 -1.60  0.00  0.30 0.0 7 1.0
NACA
0015

! *** *** Saurabh is AWESOME :D *** ***
! *** *** Saurabh is AWESOME :D *** ***
SECTION
! Xle	Yle	Zle	Chord	Ainc	Nspanwise	Sspace
 0.00 -1.58  0.00  0.30 0.0 7 1.0

CONTROL
! Cname	Cgain	Xhinge	HingeVec	SgnDup
ailer 1.0  0.70 0.0 0.0 0.0 -1.0

SECTION
! Xle	Yle	Zle	Chord	Ainc	Nspanwise	Sspace
 0.00 -0.82  0.00  0.30 0.0 7 1.0

CONTROL
! Cname	Cgain	Xhinge	HingeVec	SgnDup
ailer 1.0  0.70 0.0 0.0 0.0 1.0

! *** *** Saurabh is AWESOME :D *** ***
! *** *** Saurabh is AWESOME :D *** ***
SECTION
! Xle	Yle	Zle	Chord	Ainc	Nspanwise	Sspace
 0.00 -0.80  0.00  0.30 0.0 7 1.0

CONTROL
! Cname	Cgain	Xhinge	HingeVec	SgnDup
flap3 1.0  0.70 0.0 0.0 0.0 1.0

SECTION
! Xle	Yle	Zle	Chord	Ainc	Nspanwise	Sspace
 0.00 -0.34  0.00  0.30 0.0 7 1.0

CONTROL
! Cname	Cgain	Xhinge	HingeVec	SgnDup
flap3 1.0  0.70 0.0 0.0 0.0 1.0

! *** *** Saurabh is AWESOME :D *** ***
! *** *** Saurabh is AWESOME :D *** ***
SECTION
! Xle	Yle	Zle	Chord	Ainc	Nspanwise	Sspace
 0.00 -0.32  0.00  0.30 0.0 7 1.0

CONTROL
! Cname	Cgain	Xhinge	HingeVec	SgnDup
flap2 1.0  0.70 0.0 0.0 0.0 1.0

SECTION
! Xle	Yle	Zle	Chord	Ainc	Nspanwise	Sspace
 0.00 -0.16  0.00  0.30 0.0 7 1.0

CONTROL
! Cname	Cgain	Xhinge	HingeVec	SgnDup
flap2 1.0  0.70 0.0 0.0 0.0 1.0

! *** *** Saurabh is AWESOME :D *** ***
! *** *** Saurabh is AWESOME :D *** ***
SECTION
! Xle	Yle	Zle	Chord	Ainc	Nspanwise	Sspace
 0.00 -0.14  0.00  0.30 0.0 7 1.0

CONTROL
! Cname	Cgain	Xhinge	HingeVec	SgnDup
flap1 1.0  0.70 0.0 0.0 0.0 1.0

SECTION
! Xle	Yle	Zle	Chord	Ainc	Nspanwise	Sspace
 0.00 -0.02  0.00  0.30 0.0 7 1.0

CONTROL
! Cname	Cgain	Xhinge	HingeVec	SgnDup
flap1 1.0  0.70 0.0 0.0 0.0 1.0

! *** *** Saurabh is AWESOME :D *** ***
! *** *** Saurabh is AWESOME :D *** ***
SECTION
! Xle	Yle	Zle	Chord	Ainc	Nspanwise	Sspace
 0.00  0.00  0.00  0.30 0.0 7 1.0

! *** *** Saurabh is AWESOME :D *** ***
SURFACE
RUDDER
! Nchordwise	Cspace	Nspanwise	Sspace
7 1.0 17 1.0

SECTION
! Xle	Yle	Zle	Chord	Ainc	Nspanwise	Sspace
 1.05 -0.55  0.00  0.17 0.0
NACA
0015

CONTROL
! Cname	Cgain	Xhinge	HingeVec	SgnDup
ELEV 1.0  0.70 0.0 0.0 0.0 1.0

SECTION
! Xle	Yle	Zle	Chord	Ainc	Nspanwise	Sspace
 1.05  0.00  0.00  0.17 0.0

CONTROL
! Cname	Cgain	Xhinge	HingeVec	SgnDup
ELEV 1.0  0.70 0.0 0.0 0.0 1.0
